*Heading
** Job name: Job-2 Model name: spiral_Model-1
** Generated by: Abaqus/CAE 2025
*Preprint, echo=NO, model=NO, history=NO, contact=NO
**
** PARTS
**
*Part, name=Spiral
*Node
      1,  0.047297854,  0.101040564, 0.00200000009
      2, 0.0473523289,  0.100955017, 0.00200000009
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*Element, type=C3D8R
 1,    1,    2,  334,  373,  415,  417, 4795, 4775
 2,  373,  334,  335,  372, 4775, 4795, 4796, 4776
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*Nset, nset=a-tape-Set
    1,    2,    3,    4,    5,    6
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*Elset, elset=a-tape-Set
    1,    2,    3,    4,    5,    6
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*Nset, nset=b-tape-Set
    1,    2,    3,    4,    5,    6
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*Elset, elset=b-tape-Set
  329,  330,  331,  332,  333,  334
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*Nset, nset=plywood-Set
     1,     2,     3,     4,     5,     6
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*Elset, elset=plywood-Set
   363,   364,   365,   366,   367,   368
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** Section: tape_Section
*Solid Section, elset=a-tape-Set, material=tape
,
** Section: tape_Section
*Solid Section, elset=b-tape-Set, material=tape
,
** Section: plywood_Section
*Solid Section, elset=plywood-Set, material=plywood
,
*End Part
**
**
** ASSEMBLY
**
*Assembly, name=Assembly
**
*Instance, name=Spiral-1, part=Spiral
*End Instance
**
*Nset, nset=_PickedSet11, internal, instance=Spiral-1
   260,   261,   262,   263,   264,   265
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*Elset, elset=_PickedSet11, internal, instance=Spiral-1, generate
 13627,  15212,      1
*Nset, nset=_PickedSet12, internal, instance=Spiral-1
    46,    47,    48,    49,   132,   133
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*Elset, elset=_PickedSet12, internal, instance=Spiral-1, generate
  5718,  10454,      1
*Nset, nset=_PickedSet13, internal, instance=Spiral-1
    46,    47,    48,    49,   132,   133
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*Elset, elset=_PickedSet13, internal, instance=Spiral-1, generate
  5718,  10454,      1
*Nset, nset=_PickedSet14, internal, instance=Spiral-1
   260,   261,   262,   263,   264,   265
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*Elset, elset=_PickedSet14, internal, instance=Spiral-1, generate
 13627,  15212,      1
*End Assembly
**
** MATERIALS
**
*Material, name=plywood
*Elastic
 7e+09, 0.13
*Material, name=tape
*Elastic
 5e+08, 0.34
** ----------------------------------------------------------------
**
** STEP: Step-2
**
*Step, name=Step-2, nlgeom=NO
*Static
1., 1., 1e-05, 1.
**
** BOUNDARY CONDITIONS
**
** Name: fixed_BC-2 Type: Displacement/Rotation
*Boundary
_PickedSet14, 1, 1
_PickedSet14, 2, 2
_PickedSet14, 3, 3
_PickedSet14, 4, 4
_PickedSet14, 5, 5
_PickedSet14, 6, 6
**
** LOADS
**
** Name: Load-2   Type: Body force
*Dload
_PickedSet13, BZ, -10.
**
** OUTPUT REQUESTS
**
*Restart, write, frequency=0
*Output, field, frequency=0
*Output, history, frequency=0
*End Step
