*Heading
** Job name: statics_displacement_Job-5 Model name: spiral_Model_static_displacement
** Generated by: Abaqus/CAE 2025
*Preprint, echo=NO, model=NO, history=NO, contact=NO
**
** PARTS
**
*Part, name=Spiral
*Node
      1,  0.047297854,  0.101040564, 0.00200000009
      2, 0.0473523289,  0.100955017, 0.00200000009
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*Element, type=C3D8R
 1,    1,    2,  334,  373,  415,  417, 4795, 4775
 2,  373,  334,  335,  372, 4775, 4795, 4796, 4776
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*Nset, nset=a-tape-Set
    1,    2,    3,    4,    5,    6
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*Elset, elset=a-tape-Set
    1,    2,    3,    4,    5,    6
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*Nset, nset=b-tape-Set
    1,    2,    3,    4,    5,    6
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*Elset, elset=b-tape-Set
  329,  330,  331,  332,  333,  334
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*Nset, nset=plywood-Set
     1,     2,     3,     4,     5,     6
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*Elset, elset=plywood-Set
   363,   364,   365,   366,   367,   368
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** Section: tape_Section
*Solid Section, elset=a-tape-Set, material=tape
,
** Section: tape_Section
*Solid Section, elset=b-tape-Set, material=tape
,
** Section: plywood_Section
*Solid Section, elset=plywood-Set, material=plywood
,
*End Part
**
**
** ASSEMBLY
**
*Assembly, name=Assembly
**
*Instance, name=Spiral-1, part=Spiral
*End Instance
**
*Nset, nset=_PickedSet18, internal, instance=Spiral-1
    44,    45,   255,   265,   266,  3363
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*Elset, elset=_PickedSet18, internal, instance=Spiral-1
 10604, 10605, 10606, 10607, 10622, 10626
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*Nset, nset=_PickedSet39, internal, instance=Spiral-1
   246,   247,   248,   249,   250,   251
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*Elset, elset=_PickedSet39, internal, instance=Spiral-1, generate
  8876,  10454,      1
*End Assembly
**
** MATERIALS
**
*Material, name=plywood
*Density
680.,
*Elastic
 7e+09, 0.13
*Material, name=tape
*Density
880.,
*Elastic
 5e+08, 0.34
** ----------------------------------------------------------------
**
** STEP: Step-1
**
*Step, name=Step-1, nlgeom=YES
*Static
0.001, 1., 1e-05, 0.05
**
** BOUNDARY CONDITIONS
**
** Name: BC-1 Type: Displacement/Rotation
*Boundary
_PickedSet18, 1, 1
_PickedSet18, 2, 2
_PickedSet18, 3, 3
_PickedSet18, 4, 4
_PickedSet18, 5, 5
_PickedSet18, 6, 6
** Name: BC-2 Type: Displacement/Rotation
*Boundary
_PickedSet39, 3, 3, -0.01
**
** OUTPUT REQUESTS
**
*Restart, write, frequency=0
**
** FIELD OUTPUT: F-Output-1
**
*Output, field, variable=PRESELECT
**
** HISTORY OUTPUT: H-Output-1
**
*Output, history, variable=PRESELECT
*End Step
