*Heading
** Job name: Job-6 Model name: Spiral_Model_6
** Generated by: Abaqus/CAE 2025
*Preprint, echo=NO, model=NO, history=NO, contact=NO
**
** PARTS
**
*Part, name=Final_Part
*Node
      1, 0.0824703127,  0.110258363, 0.00249999994
      2, 0.0824599788,  0.110157475, 0.00249999994
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*Element, type=C3D8R
 1,   6,   7, 434,  10,   1,   2, 387,   5
 2,   7, 388, 433, 434,   2, 341, 386, 387
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*Nset, nset=_PickedSet38, internal
    1,    2,    3,    4,    5,    6
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*Elset, elset=_PickedSet38, internal, generate
    1,  1602,     1
*Nset, nset=_PickedSet39, internal
      6,      7,      8,      9,     10,     20
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*Elset, elset=_PickedSet39, internal, generate
   1603,  128467,       1
** Section: Tape_Section
*Solid Section, elset=_PickedSet38, material=Tape_Material
,
** Section: Plywood_Section
*Solid Section, elset=_PickedSet39, material=Plywood_Material
,
*End Part
**
**
** ASSEMBLY
**
*Assembly, name=Assembly
**
*Instance, name=Final_Part-1, part=Final_Part
*End Instance
**
*Nset, nset=_PickedSet43, internal, instance=Final_Part-1
  175,  180,  185,  188,  189,  191
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*Elset, elset=_PickedSet43, internal, instance=Final_Part-1, generate
 1405,  1602,     1
*Elset, elset=__PickedSurf41_S2, internal, instance=Final_Part-1, generate
 89363,  95957,      1
*Surface, type=ELEMENT, name=_PickedSurf41, internal
__PickedSurf41_S2, S2
*Elset, elset=__PickedSurf42_S2, internal, instance=Final_Part-1, generate
 121966,  128467,       1
*Surface, type=ELEMENT, name=_PickedSurf42, internal
__PickedSurf42_S2, S2
*End Assembly
**
** MATERIALS
**
*Material, name=Plywood_Material
*Density
680.,
*Elastic
 7e+09, 0.13
*Material, name=Tape_Material
*Density
880.,
*Elastic
 5e+10, 0.34
** ----------------------------------------------------------------
**
** STEP: Step-1
**
*Step, name=Step-1, nlgeom=YES
*Static
1., 1., 1e-05, 1.
**
** BOUNDARY CONDITIONS
**
** Name: BC-1 Type: Symmetry/Antisymmetry/Encastre
*Boundary
_PickedSet43, ENCASTRE
**
** LOADS
**
** Name: Load-1   Type: Surface traction
*Dsload
_PickedSurf41, TRVEC, 16000., 0., 0., 1.
** Name: Load-2   Type: Surface traction
*Dsload
_PickedSurf42, TRVEC, 16000., 0., 0., -1.
**
** OUTPUT REQUESTS
**
*Restart, write, frequency=0
**
** FIELD OUTPUT: F-Output-1
**
*Output, field, variable=PRESELECT
**
** HISTORY OUTPUT: H-Output-1
**
*Output, history, variable=PRESELECT
*End Step
